F := 1
T := 1/F
faz := 1.57
tr(t) :=
    -20*(t - 0.25) if (t < 0.5)
    20*(t - 0.75) if t ≥ 0.5
s(t) := 5*sin(t*2*π + faz)
out(t) := tr(t) + s(t)
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F*integral(out(t), t = 0 .. T) = 6.50521e-19
sqrt(F*integral(out(t)^2, t = 0 .. T)) = 6.41074
